// SBML level 3 version 1

model lac()
  // model units - substance: item, time: second, volume: litre, extent: item

  // Compartments:
  compartment cell = 8e-16;
  compartment exterior = 8e-16;

  // Species:
  substanceOnly species O in cell = 1;
  substanceOnly species OFNR in cell = 0;
  substanceOnly species mRNA in cell = 77;
  substanceOnly species apoFNR in cell = 2231;
  substanceOnly species FNR in cell = 39;

  // Reactions:
  FNR_Obinding: O + FNR => OFNR; k1*FNR*O/(avogadro*cell);
    k1 = 1e8 per_molar_per_second;
  OFNR_unbinding: OFNR => O + FNR; k2*OFNR;
    k2 = 1.7322e2 per_second;
  transcription: O => O + mRNA; k3*O;
    k3 = 1.084 per_second;
  translation: mRNA => mRNA + apoFNR; k4*mRNA;
    k4 = 8.06667e-3 per_second;
  apoFNR_degradation: apoFNR => ; k5*apoFNR;
    k5 = 2.071e-4 per_second;
  FNR_activation: 2 apoFNR => FNR; k6*apoFNR*(apoFNR - 1);
    k6 = 1.9716e4 per_molar_per_second;
  FNR_degradation: FNR => ; k8*FNR;
    k8 = 2.467e-4 per_second;
  mRNA_degradation: mRNA => ; k9*mRNA;
    k9 = 1.021e-2 per_second;

  // Unit definitions:
  unit per_second = 1 / second;
  unit per_item_per_second = 1 / (item * second);
  unit per_molar_per_second = litre / (mole * second);
end
