// SBML level 3 version 1

model lac_npf()
  // model units - substance: item, time: second, volume: litre, extent: item

  // Compartments:
  compartment Cell = 1e-15;

  // Species:
  substanceOnly species i in Cell = 1;
  substanceOnly species a in Cell = 0;
  substanceOnly species m in Cell = 0;
  substanceOnly species y in Cell = 0;

  // Reactions:
  activation: i => a; ka*i;
    ka = 6.3e-4 per_second;
  inactivation: a => i; ki*a;
    ki = 5.05e-2 per_second;
  transcription: a => a + m; ktr*a;
    ktr = 1.26e-1 per_second;
  translation: m => m + y; ktn*m;
    ktn = 4.44e-2 per_second;
  mrna_degradation: m => ; kdegm*m;
    kdegm = 1.11e-2 per_second;
  protein_degradation: y => ; kdegp*y;
    kdegp = 2.1e-4 per_second;

  // Unit definitions:
  unit per_second = 1 / second;
  unit per_item_per_second = 1 / (item * second);
end
